x_1 := 2
n_3 := 5
x := 15
rodion := 10, 14 .. 140
# 5 задание
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n_1 := (rnd(10) + 1)
x_3 := -2, -1.6 .. 2
y_2 := 9
y := (sqrt(x_1^3 + n_1) + cos(|n_1*x_1 - 1|)^2/sqrt(x_1^5 + sin(x) + n_1)*cos((π/4)*(x_1 + n_1)))
f_3(x) := (x^2 - n_3*x + sin(x))*sqrt(|cos(π*x)|)
n := 2
z := -3
f_3(x_3) = [13.0907; 5.31457; 5.85361; 3.52824; 0.984254; 0; -0.806368; -2.37694; -3.26318; -2.4684; -5.0907]
A := runif(3, -3*n, 3*n)
A = [-3.68012; 1.02007; -1.7963]
n_11 := round(n_1, 2)
p := if(x > y_2, |sin(x) + 3*y_2| - z^2, (y_2 + 3)/sqrt((z^2 + 1) + ln(|x + 1|)))
B := runif(3, -3*n, 3*n)
n_11 = 1.01
cos(28 deg) = 0.882948
p = 18.6503
(dggsjf + dhcjsd + gjdg + jdgfjdg)/wfjvkejk
y = 2.96899
q := if(x > y_2 and x < 1, cos(x) + 2*|y_2 + 1| - z, (x*y_2 + 3)/sqrt(y_2^2 + 5))
B = [3.87405; -3.91045; 2.52594]
# 6 задание
q = 14.8809
dx := 0.25
C := runif(3, -3*n, 3*n)
C = [-2.35217; -4.90306; -4.23224]
w := if(x < y_2 or y_2 ≥ 10, x^2 + 2*(x*y_2 + 1) - z, (x^-3*y_2^2 + 3)*sqrt(z^2 + 7))
x_6 := -9, -8.75 .. 9
w = 12.096
f(x_6) := if(x_6 < 0, e^x_6*x_6^3, e^(-x_6)*x_6^3)
s := A*B
s = -22.7833
# 13 задание
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# 8 задание
w_1 := if(x < y_2 or y_2 ≥ 10, 1, 2)
x_13 := 1
y_13 := 1
z_13 := 1
V := B×C
V = [28.9348; 10.4545; -28.1928]
w_1 = 2  # 10 задание
Given
x_8 := -3, -2.9 .. 3
n_13 := 5
w := (A×B)*C
w = -45.1767
h_10(x_10) := x_10^2 + (x_10 - 2)*sin(x_10)
n_13*x_13 + (n_13 + 1)*y_13 + (n_13 + 2)*z_13 == 6*n_13 + 8
g_8(x_8) := e^(-x_8^2)
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(n_13 - 3)*x_13 + (n_13 - 2)*y_13 + n_13*z_13 == 6*n_13 - 7
p_8(x_8) := d/dx_8(g_8(x_8))
A_13 := [5, 6, 7; 2, 3, 5; 4, 5, 6]
(n_13 - 1)*x_13 + n_13*y_13 + (n_13 + 1)*z_13 == 6*n_13 + 2
LA := sqrt(A[0]^2 + A[1]^2 + A[2]^2)
q_8(x_8) := d^2/dx_8^2(g_8(x_8))
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|A| = 4.22026
LA = 4.22026
|A| = 4.22026
B_13 := [38; 23; 32]
Find(x_13, y_13, z_13) = [1; 2; 3]
# 7 задание
|B| = 6.05643
n_13*x_13 + (n_13 + 21)*y_13 + (n_13 + 2)*z_13 = 38
|C| = 6.89091
X_13 := A_13^-1*B_13
6*n_13 + 8 = 38
x_10_2 := 2.5
x_10 := -2
r :=
    y ← "Это B" if |B| > |A| and |B| > |C|
    y ← "Это A" if |A| > |B| and |A| > |C|
    y ← "Это C" otherwise
    y
(n_13 - 3)*x_13 + (n_13 - 2)*y_13 + n_13*z_13 = 10
root10_2 := root(h_10(x_10), x_10)
root10 := root(h_10(x_10), x_10)
X_13 = [1; 2; 3]
6*n_13 - 7 = 23
root10_2 = 2.54402e-9
root10 = 2.54402e-9
(n_13 - 1)*x_13 + n_13*y_13 + (n_13 + 18)*z_13 = 32
check10_2 := h_10(root10_2)
check10 := h_10(root10)
r = "Это C"
6*n_13 + 2 = 32
D1 := -10
check10_2 = -5.08804e-9
D2 := 10
check10 = -5.08804e-9
n := 10
k := D2 - D1 = 20
i := 0 .. n - 1
j := 0 .. n - 1
# 9 задание
# 11 задание
# 14 задание
M[i, j] := D1 + rnd(k)
x_7 := -2*π, -1.75 .. 2*π
f_11(x_11) := x_11^2 + x_11*sin(2*x_11) - (x_11 - 5)*cos(x_11)
x := 0
g_7(x_7) := sqrt(|x_7|)*sin(x_7)
y := 0
n_7 := ceil((2*π - (-2*π))/(0.25*π) + 1) = 17
h(x, y) := sin(sqrt(x^2 + y^2))/sqrt(x^2 + y^2)
Given
x_7[0] := -2*π
x^2/81 + y^2/16 == 1
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# [component: inputs h]
i := 1 .. n - 1
(x - 9)^2 + (y - 2)^2 == 25
M = [
    9.77017, -7.61841, -9.82155, 0.633283, 2.03528, -6.67501, -0.984282, -8.85888, 5.66638, 0.397523;
    7.51936, 9.118, 0.78683, -0.758523, 7.24439, 5.59317, 9.93591, 2.22985, -4.67572, 6.80238;
    -2.48285, 3.54374, -9.82366, -4.48226, 1.75823, 6.75215, -0.301388, 4.87455, -0.840485, 4.88837;
    1.98083, 4.70008, 1.44797, -6.96886, -1.4967, 0.342401, 5.03073, -6.62008, -0.162315, 3.99506;
    -7.04959, -7.16803, 3.85761, -1.46907, 9.33208, -6.93489, 6.43346, -6.17299, 6.34367, -6.88873;
    4.64014, -4.40822, 3.64487, 4.43816, -7.53945, 6.69314, 0.34037, -1.47577, 8.98677, 0.990812;
    -0.565567, 6.93928, -0.87813, 9.659, 4.78367, -6.07986, 6.78857, 0.0182435, -9.45008, 1.45145;
    0.626339, 6.86073, 3.15198, 6.84273, -7.80106, -3.7183, -4.27836, -7.19438, 6.69233, 2.00485;
    -4.94559, -9.96761, 6.12479, -5.7885, 1.06385, -7.72433, 5.04436, 0.868575, -1.26575, 3.92413;
    -1.26634, 1.55733, 2.57334, 0.0829852, 3.91536, -6.20097, -6.4325, -0.850831, -8.04955, -8.11192
]
x_7[i] := x_7[i - 1] + 0.25*π
X := Find(x, y)
y_7[i] := g_7(x_7[i])
X = [4.23934; 3.52845]
Y := y_7
X := x_7[:, 0]
f_114(x_114) := sqrt((1 - x_114^2/81)*16)
sum(M[:, 9]) = 9.45393
x_11 := -2.5
f_115(x_114) := sqrt(25 - (x_114 - 9)^2) + 2
root11 := root(f_11(x_11), x_11)
resu := sum(M[:, 1]) + sum(M[:, 2]) + sum(M[:, 3]) + sum(M[:, 4]) + sum(M[:, 5]) + sum(M[:, 6]) + sum(M[:, 7]) + sum(M[:, 8]) + sum(M[:, 9]) + sum(M[:, 0])
log(25, 5)
root11 = -2.97354
f_116(x_114) := -sqrt((1 - x_114^2/81)*16)
resu = 21.4743
result := round(resu, 2) = 21.47
x_11_2 := -0.5
WRITEPRN("X.txt") := X
root11_2 := root(f_11(x_11), x_11)
f_117(x_114) := -sqrt(25 - (x_114 - 9)^2) + 2
sum(transpose(M)[:, 2]) = 3.88641
for x ∈ 0, 1 .. 9
    for y ∈ 0, 1 .. 9
        y ← s if M[x, y] > 0
s := 0
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WRITEPRN("Y.txt") := Y
root11_2 = -2.97354
x := 6
XX := READPRN("X.txt")
x_11_3 := 2
y := -2
M[5, 5] = 6.69314
YY := READPRN("Y.txt")
root11_3 := root(f_11(x_11), x_11)
Given
sum(M[:, 2]) = 1.06405
root11_3 = -2.97354
summ := sum(sum(M[i, j], j = 0 .. 1), i = 5 .. 8)
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x^2/81 + y^2/16 == 1
summ = -0.8205
(x - 9)^2 + (y - 2)^2 == 25
qqq := sum(transpose(M)[:, 5])
qqq = 16.3108
T :=
    np ← 0
    for x ∈ 0, 1 .. 9
        for y ∈ 0, 1 .. 9
            np ← np + M[x, y] if M[x, y] > 0
    np
X := Find(x, y)
log(3, 27)
X = [6.9308; -2.55175]
# 12 задание | 15 задание
T = 243.722
n_12 := 4
f_15(x_15) := x_15*sin(x_15)
P :=
    np ← 0
    for x ∈ 0, 1 .. 9
        for y ∈ 0, 1 .. 9
            np ← np + M[x, y] if M[x, y] < 0
    np
f_12(x_12) := x_12^3 + (4 - n_12)*x_12^2 + (3 - 4*n_12)*x_12 - 3*n_12
x_15 := 0, 0.1 .. 10
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v := [-3*n_12; 3 - 4*n_12; 4 - n_12; 1]
P = -222.247
t_12 := polyroots(v)
X := M[:, 0]
Y := transpose(M)[:, 9]
t_12 = [-3; -1; 4]
tY := [0; 0; 0]
f_12(t_12) = [-1.95399e-13; -1.91847e-13; -1.84741e-13]
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x_15 := 5
x_min := Minimize(f_15, x_15)
x_min = 4.91318
y_min := f_15(x_min)
y_min = -4.81447
x_15_1 := 2
x1_max := Maximize(f_15, x_15_1)
x1_max = 2.02876
X = [9.77017; 7.51936; -2.48285; 1.98083; -7.04959; 4.64014; -0.565567; 0.626339; -4.94559; -1.26634]
Y = [-1.26634; 1.55733; 2.57334; 0.0829852; 3.91536; -6.20097; -6.4325; -0.850831; -8.04955; -8.11192]
y1_max := f_15(x1_max)
y1_max = 1.81971
x_15_2 := 8
x2_max := Maximize(f_15, x_15_2)
x2_max = 7.97867
y2_max := f_15(x2_max)
y2_max = 7.91673
d_111(x_111) := 3*x_111 - 17
R := X*Y
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R = -10.0748
x_111 := 3.5
x1 := root(d_111(x_111), x_111)
x1 = 5.66667
3*x1 = 17
d_111(x1) = 0
x1_1 := root(d_111(x_111), x_111, 5, 6)
2*x_222 := 5 - y_222  # error: Здесь необходимо указать имя.
x1_1 = 5.66667
x_222 + 3*y_222 := 7  # error: Здесь необходимо указать имя.
A_222 := [2, 1; 1, 2]
B_222 := [5; 7]
[x_222; y_222] := A_222^-1*B_222
x_222 = 1
y_222 = 3
Given
2*x_222 + y_222 == 5
x_222 + 3*y_222 == 7
X := Find(x_222, y_222)
X = [1.6; 1.8]
x_222 := -4 .. 4
f_222(x_222) := 5 - 2*x_222
f_2222(x_222) := (7 - x_222)/3
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