1
xL := min(x)
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[0; 0; 4; 0; 0; -4; -4; 0; 0; 0; -2.7; -2.7; 0; 0; -2.7; -2.7; 0; □; □; □; □; □]
[-2; -3; 0; 3; 2; 2; -2; -2; 2; 1.5; 1.5; 0.5; 0.5; -1.5; -1.5; -0.5; -0.5; □; □; □; □; □]
xH := max(x)
yL := min(y)
yH := max(y)
Xs := (x - xL)/(xH - xL)*300 + 100
Ys := (y - yL)/(yH - yL)*300 + 200
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2
x := -6, -6 + 0.1 .. 6
f(x) := sin(π*x)*sqrt(|x|)
yH := 2.34520787991
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yL := -2.34520787991
Xs2(x) := (x + 6)/12*700 + 100
Ys2(x) := (f(x) - yL)/(yH - yL)*700 + 200
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