1
x := [-2; -3; 0; 3; 2; 2; -2; -2; 2]
y := [0; 0; 4; 0; 0; -4; -4; 0; 0]
xL := min(x)
xH := max(x)
yL := min(y)
yH := max(y)
Xs := (x - xL)/(xH - xL)*(400 - 100) + 100
Ys := (y - yL)/(yH - yL)*(500 - 200) + 200
xO := [0; 1; -1; 0]
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yO := [3; 1; 1; 3]
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2
x := -6, -6 + 0.1 .. 6
f(x) := sin(π*x)*sqrt(|x|)
yH := 2.34520787991
yL := -2.34520787991
D^w == D^w*(100, 200, 800, 900)
D^w == D^w*(x[L], y[L], x[H], y[H])
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Xs2(x) := (x + 6)/12*(800 - 100) + 100
Ys2(x) := (f(x) - yL)/(yH - yL)*(900 - 200) + 200
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