Ax := 4
Ay := 2
Bx := 4
By := 8
Cx := 6
Cy := 7
Dx := 6
Dy := 3
X := [Ax; Bx; Cx; Dx; Ax]
Y := [Ay; By; Cy; Dy; Ay]
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P := [Ax, Bx, Cx, Dx; Ay, By, Cy, Dy; 1, 1, 1, 1]
k1 := 0
b1 := 0
Given
By == k1*Bx + b1
Cy == k1*Cx + b1
[k1; b1] := Find(k1, b1)
k1 = -0.5
b1 = 10
k2 := 0
b2 := 0
Given
Ay == k2*Ax + b2
Dy == k2*Dx + b2
[k2; b2] := Find(k2, b2)
k2 = 0.5
b2 = 0
x := 0
y := 0
Given
y == k1*x + b1
-BC
y == k2*x + b2
-AD
[x; y] := Find(x, y)
x = 10
y = 5
Px := 10
Py := 5
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P = [4, 4, 6, 6; 2, 8, 7, 3; 1, 1, 1, 1]
φ := -90
Ts(dx, dy) := [1, 0, -dx; 0, 1, -dy; 0, 0, 1]
Ro(φ) := [cos(φ), -sin(φ), 0; sin(φ), cos(φ), 0; 0, 0, 1]
P1 := Ts(Px, Py)*P = [-6, -6, -4, -4; -3, 3, 2, -2; 1, 1, 1, 1]
φ_rad := φ*π/180 = -1.5708
P2 := Ro(φ_rad)*P1 = [-3, 3, 2, -2; 6, 6, 4, 4; 1, 1, 1, 1]
P3 := Ts(-Px, -Py)*P2 = [7, 13, 12, 8; 11, 11, 9, 9; 1, 1, 1, 1]
Xrot := [P3[0, 0]; P3[0, 1]; P3[0, 2]; P3[0, 3]; P3[0, 0]]
Yrot := [P3[1, 0]; P3[1, 1]; P3[1, 2]; P3[1, 3]; P3[1, 0]]
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