# Х
P := [7, 0, 0, 2, 0, 0; 0, 0, 7, 0, 0, 2; 0, 0, 0, 7, 7, 7; 1, 1, 1, 1, 1, 1]  # Y
A := submatrix(P, 0, 2, 0, 0)
# Z
B := submatrix(P, 0, 2, 1, 1)
C := submatrix(P, 0, 2, 2, 2)
PC := [10; 60; 60]
A1 := submatrix(P, 0, 2, 3, 3)
B1 := submatrix(P, 0, 2, 4, 4)
C1 := submatrix(P, 0, 2, 5, 5)
C = [0; 7; 0]
A1 = [2; 0; 7]
A = [7; 0; 0]
B = [0; 0; 0]
B1 = [0; 0; 7]
C1 = [0; 2; 7]
r_v := PC[0]
ϕ_v := PC[1]*π/180
θ_v := PC[2]*π/180
x_LW := 200
y_LW := 100
x_HW := 700
y_HW := 500
K_view := [
    -sin(ϕ_v), cos(ϕ_v), 0, 0;
    -cos(θ_v)*cos(ϕ_v), -cos(θ_v)*sin(ϕ_v), sin(θ_v), 0;
    -sin(θ_v)*cos(ϕ_v), -sin(θ_v)*sin(ϕ_v), -cos(θ_v), r_v;
    0, 0, 0, 1
]
PIR_V := K_view*P
# (без  Z)
P_XY := stack(transpose(transpose(PIR_V)[:, 0]), transpose(transpose(PIR_V)[:, 1]), transpose(transpose(PIR_V)[:, 3]))
x_L := min(transpose(P_XY)[:, 0])
y_H := max(transpose(P_XY)[:, 1])
x_L = -6.06218
y_H = 6.06218
x_H := max(transpose(P_XY)[:, 0])
y_L := min(transpose(P_XY)[:, 1])
x_H = 3.5
y_L = -3.03109
Δx_W := x_HW - x_LW
Δx := x_H - x_L
Δy_W := y_HW - y_LW
Δy := y_H - y_L
k_x := Δx_W/Δx
k_y := Δy_W/Δy
T_SW := [k_x, 0, x_LW - k_x*x_L; 0, -k_y, y_HW + k_y*y_L; 0, 0, 1]
M_W := T_SW*P_XY
[x_a, x_b, x_c, x_a1, x_b1, x_c1; y_a, y_b, y_c, y_a1, y_b1, y_c1; q, q, q, q, q, q] := vectorize(round(M_W))
X := transpose([x_c, x_b, x_a, x_c, x_c1, x_b1, x_b, x_b1, x_a1, x_a, x_a1, x_c1])
Y := transpose([y_c, y_b, y_a, y_c, y_c1, y_b1, y_b, y_b1, y_a1, y_a, y_a1, y_c1])
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AA1 := [A1[0]; A1[1]; A1[2]] - [A[0]; A[1]; A[2]]
AC := [C[0]; C[1]; C[2]] - [A[0]; A[1]; A[2]]
N_AA1C1C := AC×AA1
A1B1 := [B1[0]; B1[1]; B1[2]] - [A1[0]; A1[1]; A1[2]]
A1C1 := [C1[0]; C1[1]; C1[2]] - [A1[0]; A1[1]; A1[2]]
N_A1B1C1 := A1C1×A1B1
AB := [B[0]; B[1]; B[2]] - [A[0]; A[1]; A[2]]
AC := [C[0]; C[1]; C[2]] - [A[0]; A[1]; A[2]]
N_ABC := AB×AC
N_AA1B1B := AA1×AB
BB1 := [B1[0]; B1[1]; B1[2]] - [B[0]; B[1]; B[2]]
BC := [C[0]; C[1]; C[2]] - [B[0]; B[1]; B[2]]
N_BB1C1C := BB1×BC
R_C := [r_v*sin(θ_v)*cos(ϕ_v); r_v*sin(θ_v)*sin(ϕ_v); r_v*cos(θ_v)] = [4.33013; 7.5; 5]
F5x := transpose([x_a, x_a1, x_c1, x_c, x_a])
F5y := transpose([y_a, y_a1, y_c1, y_c, y_a])
q1 := N_AA1C1C*R_C
F5x := if(q1 ≥ 0, F5x, F5x*0)
s1 := if(q1 ≥ 0, "Видно", "Не видно")
F1x := transpose([x_a, x_a1, x_b1, x_b, x_a])
s1 = "Видно"
F1y := transpose([y_a, y_a1, y_b1, y_b, y_a])
q2 := N_AA1B1B*R_C
s2 := if(q2 ≥ 0, "Видно", "Не видно")
F1x := if(q2 ≥ 0, F1x, F1x*0)
s2 = "Не видно"
F2x := transpose([x_b, x_b1, x_c1, x_c, x_b])
q3 := N_BB1C1C*R_C
s3 := if(q3 ≥ 0, "Видно", "Не видно")
F2y := transpose([y_b, y_b1, y_c1, y_c, y_b])
s3 = "Не видно"
F2x := if(q3 ≥ 0, F2x, F2x*0)
F4x := transpose([x_a, x_b, x_c, x_a])
q4 := N_ABC*R_C
s4 := if(q4 ≥ 0, "Видно", "Не видно")
F4y := transpose([y_a, y_b, y_c, y_a])
s4 = "Не видно"
F4x := if(q4 ≥ 0, F4x, F4x*0)
q5 := N_A1B1C1*R_C
s5 := if(q5 ≥ 0, "Видно", "Не видно")
F3x := transpose([x_b1, x_a1, x_c1, x_b1])
s5 = "Видно"
F3y := transpose([y_b1, y_a1, y_c1, y_b1])
F3x := if(q5 ≥ 0, F3x, F3x*0)
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x_LW := 100
y_LW := 200
y_HW := 900
x_HW := 800
Δx_W := x_HW - x_LW
Δx := x_H - x_L
Δy_W := y_HW - y_LW
Δy := y_H - y_L
Проекция
k_x := Δx_W/Δx
k_y := Δy_W/Δy
ϕ_grad := 25
ϕ := ϕ_grad/180*π
N := transpose([0, sin(ϕ), cos(ϕ)])
T_SW := [k_x, 0, x_LW - k_x*x_L; 0, -k_y, y_HW + k_y*y_L; 0, 0, 1]
x_0 := 0
y_0 := 0
z_0 := 3/4*P[:, 3][2]
D := -(N[0]*x_0 + N[1]*y_0 + N[2]*z_0)
M_W := T_SW*P_XY
V1 := C
V2 := C1
[x_a, x_b, x_c, x_a1, x_b1, x_c1; y_a, y_b, y_c, y_a1, y_b1, y_c1; q, q, q, q, q, q] := vectorize(round(M_W))
ΔV := V2 - V1
t_CC1 := -((N*V1 + D)/(N*ΔV))
X := transpose([x_c, x_b, x_a, x_c, x_c1, x_b1, x_b, x_b1, x_a1, x_a, x_a1, x_c1])
Vсс1 := V1 + ΔV*t_CC1
Y := transpose([y_c, y_b, y_a, y_c, y_c1, y_b1, y_b, y_b1, y_a1, y_a, y_a1, y_c1])
x_CC1 := Vсс1[0]
y_CC1 := Vсс1[1]
z_CC1 := Vсс1[2]
V1 := A
V2 := A1
ΔV := V2 - V1
t_AA1 := -((N*V1 + D)/(N*ΔV))
Vaa1 := V1 + ΔV*t_AA1
x_AA1 := Vaa1[0]
y_AA1 := Vaa1[1]
z_AA1 := Vaa1[2]
V1 := B
V2 := B1
ΔV := V2 - V1
t_BB1 := -((N*V1 + D)/(N*ΔV))
Vbb1 := V1 + ΔV*t_BB1
x_BB1 := Vbb1[0]
y_BB1 := Vbb1[1]
z_BB1 := Vbb1[2]
TR := [x_CC1, x_AA1, x_BB1; y_CC1, y_AA1, y_BB1; z_CC1, z_AA1, z_BB1; 1, 1, 1]
TR_V := K_view*TR
P_XY := stack(transpose(transpose(PIR_V)[:, 0]), transpose(transpose(PIR_V)[:, 1]), transpose(transpose(PIR_V)[:, 3]))
TR_XY := stack(transpose(transpose(TR_V)[:, 0]), transpose(transpose(TR_V)[:, 1]), transpose(transpose(TR_V)[:, 3]))
TR_W := T_SW*TR_XY
[x_p1, x_p2, x_p3; y_p1, y_p2, y_p3; q, q, q] := vectorize(round(TR_W))
XC := transpose([x_p1, x_p2, x_p3, x_p1])
YC := transpose([y_p1, y_p2, y_p3, y_p1])
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